Дано
E := 60
Ik := 25
RE := 16
R1 := 10
R2 := 60
R3 := 68
R4 := 10
R5 := 10
R6 := 15
R7 := 80
R8 := 50
Rk := 1*10^-8
# Расчёт проводимостей
G11 := 1/Rk + 1/R1 + 1/R2 = 100000000
G22 := 1/RE + 1/R3 + 1/(R4 + R5) + 1/R6 = 0.193873
G33 := 1/R6 + 1/R7 + 1/R8 = 0.0991667
G44 := 1/R1 + 1/R2 + 1/(R4 + R5) + 1/R7 + 1/R8 = 0.199167
G12 := 0
G21 := G12
G13 := 0
G31 := G13
G14 := 1/R1 + 1/R2
G41 := G14
G23 := 1/R6
G32 := G23
G24 := 1/(R4 + R5)
G42 := G24
G34 := 1/R7 + 1/R8
G43 := G34
Δ := [G11, -G12, -G13, -G14; -G21, G22, -G23, -G24; -G31, -G32, G33, -G34; -G41, -G42, -G43, G44]
Δ := det([G11, -G12, -G13, -G14; -G21, G22, -G23, -G24; -G31, -G32, G33, -G34; -G41, -G42, -G43, G44]) = 227457
J := [0; E/RE; -Ik; Ik]
Δ1 := det([0, -G12, -G13, -G14; E/RE, G22, -G23, -G24; -Ik, -G32, G33, -G34; Ik, -G42, -G43, G44]) = 0.0181294
Δ2 := det([G11, 0, -G13, -G14; -G21, E/RE, -G23, -G24; -G31, -Ik, G33, -G34; -G41, Ik, -G43, G44]) = -12434028
Δ3 := det([G11, -G12, 0, -G14; -G21, G22, E/RE, -G24; -G31, -G32, -Ik, -G34; -G41, -G42, Ik, G44]) = -60608354
Δ4 := det([G11, -G12, -G13, 0; -G21, G22, -G23, E/RE; -G31, -G32, G33, -Ik; -G41, -G42, -G43, Ik]) = 15539522
φ1 := Δ1/Δ = 7.97049e-8
φ2 := Δ2/Δ = -54.6654
φ3 := Δ3/Δ = -266.461
φ4 := Δ4/Δ = 68.3185
I_E := (E - φ2)/RE = 7.16659
I_1 := (φ1 - φ4)/R1 = -6.83185
I_2 := (φ1 - φ4)/R2 = -1.13864
I_3 := -φ2/R3 = 0.803903
I_4 := (φ2 - φ4)/(R4 + R5) = -6.14919
I_6 := (φ2 - φ3)/R6 = 14.1197
I_7 := (φ3 - φ4)/R7 = -4.18474
I_8 := (φ3 - φ4)/R8 = -6.69558
# 1-е Правило Кирхгофа
# Для узла 1
-I_E - I_3 - (I_1 + I_2) = -4.44089e-15
# Для узла 2
I_E + I_3 - I_6 - I_4 = -2.66454e-15
# Для узла 3
I_6 - I_7 - I_8 - Ik = 3.55271e-15
# Для узла 4
I_7 + I_8 + I_4 + I_1 + I_2 + Ik = 3.55271e-15
# 2-е Правило Кирхгофа
E = 60
# Контур 1
I_E*RE - I_3*R3 = 60
# Контур 2
I_E*RE + I_4*(R4 + R5) - I_2*R2 = 60
# Контур 3
I_E*RE + I_4*(R4 + R5) - I_1*R1 = 60
P_ист := Ik*|I_7|*R7 + E*I_E = 8799.47
P_пол := I_1^2*R1 + I_2^2*R2 + I_3^2*R3 + I_E^2*RE + I_4^2*(R4 + R5) + I_6^2*R6 + I_7^2*R7 + I_8^2*R8 = 8799.47
